*HEADING
Compressing a rectangle
**
*INCLUDE, INPUT=rectangle_mesh.inp
*SOLID SECTION, ELSET=RECTANGLE, MATERIAL=mock
**
*MATERIAL, NAME=mock
*ELASTIC
100, 0.3
*DENSITY
0.3E-08,
*EXPANSION,ZERO=293.15
10.0E-06
**
*TIME POINTS, NAME=output
*INCLUDE, INPUT=time_points.inp
**
*STEP, NLGEOM=YES, INC=100, AMPLITUDE=RAMP
*STATIC
.1, 1.0, 0.01, 0.5
**
*BOUNDARY
bottom_left, 1, 3
bottom, 2, 2
top, 2, 2, -0.01
**
*NODE FILE, TIME POINTS=output
U
*EL FILE, TIME POINTS=output
E, S
**
*END STEP
